x := [-1; 1; 2; 3; 4]
y := [-5; -3; 18; 6; -2]
m := 3
i := 0 .. last(x)
j := 0 .. m
A[i, j] := x[i]^j
A = [1, -1, 1, -1; 1, 1, 1, 1; 1, 2, 4, 8; 1, 3, 9, 27; 1, 4, 16, 64]
Z := transpose(A)*A
b := transpose(A)*y
c := Z^-1*b
c = [-7.35849; 4.63208; 5.09906; -1.50472]
t := 0, 0.01 .. 8
φ(x) := sum(c[i]*x^i, i = 0 .. m)
sum((y[i] - φ(x[i]))^2, i = 0 .. last(x)) = 111.009
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